#initialization
#echo                    screen
units                   metal
boundary                p p p
atom_style              charge

#simulation box definition
read_data              Cr2O3-Fe.data

set                     type 1 charge 3
set                     type 2 charge 0
set                     type 3 charge -2

#potential
kspace_style            pppm 1.0e-4
pair_style              hybrid/overlay coul/long 10.0 buck 10.0 buck 10.0 eam/cd tersoff/zbl
pair_coeff              * * coul/long
pair_coeff              1 3 buck 1 2362.905 0.270628 0.0
pair_coeff              3 3 buck 2 91.55955 0.547148 32.32
pair_coeff              * * eam/cd FeCr.cdeam Cr Fe NULL
pair_coeff              * * tersoff/zbl Fe-O.tersoff.zbl NULL Fe O

#setting
neighbor                5.0 bin
timestep                0.001  1fs
run                     0
variable                E equal pe #定义变量E为系统总势能
print "The system energy now is $E"

min_style               sd

thermo_style            custom step temp pe ke
thermo                  100

#compute                 pe all pe/atom
#compute                 ke all ke/atom

#输出从始到末
dump                    0 all custom 1000 dump-start-end.lammpstrj id type x y z

#能量最小化
dump                    1 all custom 1000 dump-min.lammpstrj id type x y z
minimize                1.0e-12 1.0e-12 1000000 1000000
undump			        1
print "The system energy now is $E"

#输出nve-nvt
dump                    00 all custom 1000 dump-nve-nvt.lammpstrj id type x y z

# nve 10w
velocity all create 300 4928459 dist gaussian
dump                    1 all custom 1000 dump-nve.lammpstrj id type x y z
fix                     1 all nve
run                     100000
unfix                   1
undump                  1

#输出nvt 300-800
dump                    000 all custom 1000 dump-300-800.lammpstrj id type x y z

#逐步升温300
dump                    1 all custom 1000 dump-300.lammpstrj id type x y z
fix                     1 all nvt temp 300 300 0.1
run                     500000
unfix                   1
undump                  1

#逐步升温350
dump                    1 all custom 1000 dump-350.lammpstrj id type x y z
fix                     1 all nvt temp 350 350 0.1
run                     500000
unfix                   1
undump                  1

#逐步升温400
dump                    1 all custom 1000 dump-400.lammpstrj id type x y z
fix                     1 all nvt temp 400 400 0.1
run                     500000
unfix                   1
undump                  1

#逐步升温450
dump                    1 all custom 1000 dump-450.lammpstrj id type x y z
fix                     1 all nvt temp 450 450 0.1
run                     500000
unfix                   1
undump                  1

#逐步升温500
dump                    1 all custom 1000 dump-500.lammpstrj id type x y z
fix                     1 all nvt temp 500 500 0.1
run                     500000
unfix                   1
undump                  1

#逐步升温550
dump                    1 all custom 1000 dump-550.lammpstrj id type x y z
fix                     1 all nvt temp 550 550 0.1
run                     500000
unfix                   1
undump                  1

#逐步升温600
dump                    1 all custom 1000 dump-600.lammpstrj id type x y z
fix                     1 all nvt temp 600 600 0.1
run                     500000
unfix                   1
undump                  1

#逐步升温650
dump                    1 all custom 1000 dump-650.lammpstrj id type x y z
fix                     1 all nvt temp 650 650 0.1
run                     500000
unfix                   1
undump                  1

#逐步升温700
dump                    1 all custom 1000 dump-700.lammpstrj id type x y z
fix                     1 all nvt temp 700 700 0.1
run                     500000
unfix                   1
undump                  1

#逐步升温750
dump                    1 all custom 1000 dump-750.lammpstrj id type x y z
fix                     1 all nvt temp 750 750 0.1
run                     500000
unfix                   1
undump                  1

#逐步升温800
dump                    1 all custom 1000 dump-800.lammpstrj id type x y z
fix                     1 all nvt temp 800 800 0.1
run                     500000
unfix                   1
undump                  1
