units                   metal
boundary                p s p
atom_style              atomic
lattice                 bcc 2.8552
region                  box block 0 30 0 30 0 30 units lattice
create_box              1 box
create_atoms            1 box

region                  Section block INF INF 15 INF INF INF units lattice
delete_atoms            region Section

#read_data               Fe.data

pair_style              eam/fs
pair_coeff              * * Fe_mm.eam.fs Fe
run                     0
variable                E equal pe #定义变量E为系统总势能
variable                N equal atoms #定义变量N为系统总原子数

timestep                0.001

print "The number of atoms and system energy now are $N and $E"


min_style               sd

thermo_style            custom step pe ke
thermo                  100

compute                 1 all pe/atom
compute                 2 all ke/atom
#compute                 3 all coord/atom cutoff 3.0
dump                    1 all custom 100 dump_min.lammpstrj id x y z c_1 c_2

minimize                1.0e-17 1.0e-17 1000000 1000000
print "The number of atoms and system energy now are $N, $E"

velocity all create 273.15 4928459 dist gaussian
fix                     1 all nvt temp 273.15 273.15 0.1

dump                    2 all custom 100 dump.lammpstrj id x y z c_1 c_2


run                     10000
